# OpenSim document version 40500
MarkerSet:
  Marker CLAV: torso (0.04613309 0.362511 -0.002022517)
  Marker STRN: torso (0.09014856 0.2729654 0.0009941508) fixed=true
  Marker C7: torso (-0.07028862 0.4194889 -0.003453284)
  Marker T10: torso (-0.08793566 0.2118618 -0.001065249)
  Marker RSHO: torso (-0.01041968 0.4148074 0.1709747)
  Marker LSHO: torso (-0.01041968 0.4148074 -0.1709747)
  Marker RUPA: humerus_r (-0.01900315 -0.1219433 0.001910819)
  Marker RELB: humerus_r (-0.0272011 -0.2769948 -0.006804335)
  Marker RFRM: radius_r (-0.04275274 -0.1104132 -0.001837457)
  Marker RWRA: radius_r (-0.02469403 -0.2261577 0.03032299)
  Marker RWRB: radius_r (-0.02854787 -0.2263297 -0.01031179)
  Marker RFIN: hand_r (-0.01520531 -0.07628924 0.0007784301)
  Marker RASI: pelvis (-0.0009290778 0.05633646 0.1199958)
  Marker RPSI: pelvis (-0.1544469 0.04333416 0.05627012)
  Marker LUPA: humerus_l (-0.01900315 -0.1219433 0.001910819)
  Marker LELB: humerus_l (-0.0272011 -0.2769948 -0.006804335)
  Marker LFRM: radius_l (-0.04275274 -0.1104132 -0.001837457)
  Marker LWRA: radius_l (-0.024694 -0.226158 -0.030323)
  Marker LWRB: radius_l (-0.02854787 -0.2263297 0.01031179)
  Marker LFIN: hand_l (-0.01520531 -0.07628924 -0.0007784301)
  Marker LASI: pelvis (-0.0009290778 0.05633646 -0.1199958)
  Marker LPSI: pelvis (-0.1544469 0.04333416 -0.05627012)
  Marker RBAK: torso (-0.07617722 0.3548532 0.1102792)
