# OpenSim document version 40500
ScaleTool Rajagopal_2015_scaled:
  mass: 60 [kg]
  height: 1720
  age: 27
  sex: Female
  notes: No notes
  GenericModelMaker:
    model_file: ../../OpenSim/Models/Rajagopal/Rajagopal_2015.osim
    marker_set_file: ../../OpenSim/Models/Rajagopal/webcam_markers.xml
  ModelScaler:
    apply: true
    marker_file: ../recordings/skeleton_ZED_2i_keypoints_subject00_static.trc
    time_range: -1 -1
    preserve_mass_distribution: true
    output_model_file: Models/Rajagopal/Scaled_Rajagopal.osim
  MarkerPlacer:
    apply: false
    marker_file: Unassgined
    time_range: -1 -1
    max_marker_movement: -1
